# Интерполяция кусочно-линейным методом:
res_line := READPRN("C:\Users\Daniil\source\repos\Project22\Project22/Line.txt")
# Интерполяция кусочно-квадратичным методом:
square := READPRN("C:\Users\Daniil\source\repos\Project22\Project22/Square.txt")
# Интерполяция методом Ньютона:
Newton := READPRN("C:\Users\Daniil\source\repos\Project22\Project22/.txt")  # error: Не удается открыть файл данных.
# Интерполяция методом Лагранжа:
Lagrange := READPRN("C:\Users\Daniil\source\repos\Project22\Project22/.txt")  # error: Не удается открыть файл данных.
dim := rows(res_line)
i := 0 .. dim - 1
# Исходная функция:
f(x) := sin(x)/x
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# Среднеквадратическое отклонение:
SKW := READPRN("C:\Users\Daniil\source\repos\Project22\Project22/skv.txt")
# Интерполяция кусочно-линейным методом:
SKW[0] = 0.00610588
# Интерполяция кусочно-квадратичным методом:
SKW[1] = 0.00208415
# Интерполяция методом Ньютона:
SKW[2] = 7.80279e-5
# Интерполяция методом Лагранжа:
SKW[3] = 7.80279e-5
